/TITLE, VIBRATION OF A SIMPLY SUPPORTED PLATE
/PREP7
ET,1,SHELL63
R,1,0.002
MP,EX,1,2.1E11
MP,PRXY,1,0.3
MP,DENS,1,7850
RECTNG,,0.138,,0.216
APLOT
KESIZE,ALL,0.005
AMESH,1
EPLOT
FINI
/SOLU
ANTYPE,2
MODOPT,SUBSP,5
MXPAND,5
NSEL,S,LOC,X,0
D,ALL,UZ,0
NSEL,ALL
D,1,ALL,0
NSEL,ALL
NSEL,S,LOC,X,0.138
D,ALL,UZ,0
NSEL,ALL
D,2,ALL,0
NSEL,ALL
NSEL,S,LOC,Y,0
D,ALL,UZ,0
NSEL,ALL
NSEL,S,LOC,Y,0.216
D,ALL,UZ,0
NSEL,ALL
SOLVE
